// COMSOL Multiphysics 6.2.0.339 model "40M-(13.4.isteresis.tomates-2)-25.1.mph"
// Outline of the model tree

Functions
  int1: Interpolation
    table = {{0, 11.7}, {1, 11}, {2, 10.3}, {3, 10.4}, {4, 10.6}, {5, 10.6}, {6, 10.5}, {7, 10.6}, {8, 11}, {9, 12}, {10, 14.6}, {11, 15.7}, {12, 15.3}, {13, 20.1}, {14, 25.4}, {15, 24.9}, {16, 24.4}, {17, 20.5}, {18, 18}, {19, 15.8}, {20, 15.1}, {21, 14.5}, {22, 13.8}, {23, 13.8}, {24, 13.4}}
    fununit = degC
    argunit = h
  int2: Interpolation
    table = {{0, 0}, {1, 0}, {2, 0}, {3, 0}, {4, 0}, {5, 0}, {6, 0}, {7, 0}, {8, 40}, {9, 151.9}, {10, 170.7}, {11, 125.3}, {12, 195.2}, {13, 932}, {14, 708.7}, {15, 614.6}, {16, 403.2}, {17, 179.8}, {18, 11}, {19, 0}, {20, 0}, {21, 0}, {22, 0}, {23, 0}, {24, 0}}
    fununit = degC
    argunit = h

Probes
  point1: Point "Point Probe 1" on no points | expr = T; unit = degC; descr = Temperature; table = tbl1

Common definitions
  ampr1: AmbientProperties
    AmbientData = MeteorologicalData2017
    ashrae2017Station = 855740
    ashrae2017ShortDate = {13, 4}
    ashrae2017LocalTime = {00, 00, 00}
    ashrae2017PrecipitationRate = High

Geometry
  geom1 "Geometry 1" (3D, length unit m)
    imp1: Import "air13"
      type = native
      filename = C:\Users\diego\OneDrive\Documentos\Semestre 2024-1\AIR-11.mphbin
      meshfilename = C:\Users\diego\OneDrive\Documentos\Semestre 2024-1\AIR-11.mphbin
    rot1: Rotate | input = imp1; axistype = x; rot = 90
    mov1: Move | input = rot1; displx = 0; disply = 1.3+10; displz = 1.35
    imp2: Import "muro004"
      type = native
      filename = C:\Users\diego\OneDrive\Documentos\Semestre 2024-1\air004.mphbin
      meshfilename = C:\Users\diego\OneDrive\Documentos\Semestre 2024-1\air004.mphbin
    rot2: Rotate | input = imp2; axistype = x; rot = 90
    mov2: Move | input = rot2; displx = 0; disply = 0.004+1.3+10; displz = 1.35
    imp3: Import "muro004.1"
      type = native
      filename = C:\Users\diego\OneDrive\Documentos\Semestre 2024-1\air004.mphbin
      meshfilename = C:\Users\diego\OneDrive\Documentos\Semestre 2024-1\air004.mphbin
    rot3: Rotate | input = imp3; axistype = x; rot = 90
    mov3: Move | input = rot3; displx = 0; displz = 1.35
    blk1: Block "air1" | size = {1.80, 1.30+10, 1.35}
    blk2: Block "muro1" | pos = {0, -0.004, 0}; size = {1.8, 0.004, 1.35}
    blk3: Block "muro2" | pos = {0, 1.3+10, 0}; size = {1.8, 0.004, 1.35}
    blk4: Block "muro3" | pos = {-0.004, -0.004, 0}; size = {0.004, 1.3+0.008+10, 1.35}
    blk5: Block "muro4" | pos = {-0.004+1.8, -0.004, 0}; size = {0.004, 1.3+0.008+10, 1.35}
    ext1: Extrude "techo1" (disabled)
      extrudefrom = faces
      inputface = mov1(1) boundaries 1; mov2(1) boundaries 1; mov3(1) boundaries 1
      distance = 0.004
    ext2: Extrude "techo2" (disabled) | extrudefrom = faces; inputface = ext1(1) boundaries 10; distance = 0.004
    blk6: Block | pos = {-1.25, -1.25, -0.5}; size = {4, 14, 0.5}
    blk7: Block "emisor" (disabled) | pos = {0, 0, 4}; size = {2, 2, 0.1}
    imp4: Import
      type = native
      filename = C:\Users\diego\OneDrive\Documentos\Semestre 2024-1\TECHO-11.mphbin
      meshfilename = C:\Users\diego\OneDrive\Documentos\Semestre 2024-1\TECHO-11.mphbin
    rot4: Rotate | input = imp4; pos = {0, 0.65, 0}; axistype = x; rot = 90
    mov4: Move | input = rot4; displx = 0; disply = 0.654+10; displz = 2
    blk8: Block | pos = {0, 0, 5}; size = {1, 1, 1}
    pt1: Point (disabled) | p = {0.9, 0.75, 0.75}
    fin: Finalize "Form Union"
  pgeom_gop "Geometry" (1D, length unit m)
    pt1: Point

Materials
  mat3: Common "polycarb plate" on all domains
    def "Basic"
      thermalconductivity = 0.23
      density = 1200
      heatcapacity = 1200
      absorption = 10
      scattering = 0
    RefractiveIndex
      n = 1.58
      ki = 0
  mat2: Common "Aluminosilicate fire clay brick [solid]" on no domains
    def "Basic"
      density = rho(T[1/K])[kg/m^3]
      TD = TD(T[1/K])[m^2/s]
      thermalconductivity = 0.25
      heatcapacity = 878
      scattering = 0
      absorption = 0
      rho: Piecewise | arg = T; pieces = {293.0, 303.0, 1900.0}
      TD: Piecewise | arg = T; pieces = {293.0, 1100.0, 5.650592E-7-7.720568E-10*T^1+4.722438E-13*T^2}
    RefractiveIndex
      n = 1.5
      ki = 0
  mat1: Common "Air [gas]" on domains 4, 7, 8
    def "Basic"
      thermalconductivity = k(T[1/K])[W/(m*K)]
      heatcapacity = C(T[1/K])[J/(kg*K)]
      density = rho_gas_2(T[1/K])[kg/m^3]
      TD = TD(T[1/K])[m^2/s]
      dynamicviscosity = eta(T[1/K])[Pa*s]
      absorption = 0
      ratioofspecificheat = 1.4
      scattering = 0
      k: Piecewise | arg = T; pieces = {70.0, 1000.0, -8.404165E-4+1.107418E-4*T^1-8.635537E-8*T^2+6.31411E-11*T^3-1.88168E-14*T^4}
      C: Piecewise
        arg = T
        pieces = 
          {100.0, 375.0, 1010.96988+0.0439478992*T^1-2.92239848E-4*T^2+6.50346734E-7*T^3}
          {375.0, 1300.0, 1093.29008-0.63555211*T^1+0.00163399216*T^2-1.41293513E-6*T^3+5.59492011E-10*T^4-8.66307242E-14*T^5}
          {1300.0, 3000.0, 701.080663+0.849386727*T^1-5.8464873E-4*T^2+2.30243637E-7*T^3-4.84675815E-11*T^4+4.2350197E-15*T^5}
      rho_gas_2: Piecewise | arg = T; pieces = {80.0, 3000.0, 352.716*T^-1}
      TD: Piecewise
        arg = T
        pieces = 
          {300.0, 753.0, 1.713214E-4-1.204913E-6*T^1+2.839046E-9*T^2-1.532799E-12*T^3}
          {753.0, 873.0, 0.00416418-1.191227E-5*T^1+8.863636E-9*T^2}
      eta: Piecewise
        arg = T
        pieces = 
          {120.0, 600.0, -1.132275E-7+7.94333E-8*T^1-7.197989E-11*T^2+5.158693E-14*T^3-1.592472E-17*T^4}
          {600.0, 2150.0, 3.892629E-6+5.75387E-8*T^1-2.675811E-11*T^2+9.709691E-15*T^3-1.355541E-18*T^4}
    RefractiveIndex
      n = 1
      ki = 0
  mat4: Common "Polycarbonate [solid]" (disabled) on no domains
    def "Basic"
      thermalconductivity = k(T[1/K])[W/(m*K)]
      heatcapacity = C(T[1/K])[J/(kg*K)]
      emissivity = epsilon(T[1/K])
      density = rho(T[1/K])[kg/m^3]
      TD = TD(T[1/K])[m^2/s]
      k: Piecewise | arg = T; pieces = {100.0, 573.0, 0.07182401+7.942708E-4*T^1-1.8525E-6*T^2+2.126779E-9*T^3}
      C: Piecewise | arg = T; pieces = {293.0, 573.0, -18046.9895+287.352978*T^1-1.6466019*T^2+0.00450646088*T^3-5.87659954E-6*T^4+2.94227457E-9*T^5}
      epsilon: Piecewise | arg = T; pieces = {175.0, 300.0, 0.9933552-3.582435E-4*T^1}
      rho: Piecewise | arg = T; pieces = {293.0, 303.0, 1200.0}
      TD: Piecewise | arg = T; pieces = {100.0, 573.0, 5.957212E-7-5.18831E-9*T^1+2.463205E-11*T^2-5.770381E-14*T^3+6.217806E-17*T^4-2.357766E-20*T^5}
    Enu "Young's modulus and Poisson's ratio"
      E = E(T[1/K])[Pa]
      nu = nu(T[1/K])
      E: Piecewise | arg = T; pieces = {68.0, 434.0, 4.088219E9+2241647.0*T^1-14065.89*T^2+4.672233*T^3}
      nu: Piecewise
        arg = T
        pieces = 
          {68.0, 200.0, 0.3221477+9.840993E-4*T^1-3.824874E-6*T^2+3.947734E-9*T^3}
          {200.0, 434.0, 0.2992643+0.001239395*T^1-4.745625E-6*T^2+5.028048E-9*T^3}
    KG "Bulk modulus and shear modulus"
      K = kappa(T[1/K])[Pa]
      G = mu(T[1/K])[Pa]
      mu: Piecewise | arg = T; pieces = {68.0, 434.0, 1.546508E9-314019.0*T^1-533.5888*T^2-3.406202*T^3}
      kappa: Piecewise | arg = T; pieces = {68.0, 434.0, 3.341322E9+3.450297E7*T^1-16235.84*T^2-613.4826*T^3+1.152631*T^4}
  mat5: Common "reflective walls" on all boundaries
    def "Basic"
      emissivity = 0.1
  mat6: Common ""Black" walls" on boundaries 25
    def "Basic"
      emissivity = 0.1

Physics
  gop: GeometricalOptics (disabled) on all domains
    dependent variable q = {qx, qy, qz}
    IntensityComputation.IntensityComputation = ComputeIntensityAndPower
    mp1: MediumProperties (default)
    matd1: MaterialDiscontinuity (default)
    op1: RayProperties | RayPropertySpecification = SpecifyVacuumWavelength; nu = 4.54e14[Hz]; lambda0 = 660[nm]; mp = 1
    srad1: SolarRadiation (disabled)
      GridType = Hexapolar
      RadialDistribution = UserDefined
      LocationDefinedBy = Coordinates
      Location = {-33.4571768816, -70.6610571635, -3}
      Date = {01, 10, 2017}
    relb1: ReleaseFromBoundary on no boundaries
      InitialPosition = ProjectedPlaneGrid
      Nr = 10
      RayDirectionVector = Expression
      L0 = {0, 0, -1}
      rax = {0, 0, 1}
      SpecifyInletTangentialNormal = 0
    wall1: Wall on no boundaries
    wall2: Wall on no boundaries
  ht: HeatTransferInSolidsAndFluids on all domains
    dependent variable T
    solid1: SolidHeatTransferModel "Solid 1" (default)
    init1: init "Initial Values 1" (default) | Tinit_src = userdef; Tinit = int1(t)
    ins1: ThermalInsulation (default)
    init2: init "Initial Values 2" on domains 4, 7, 8 | Tinit = 25[degC]
    ins2: ThermalInsulation on no boundaries
    hf1: HeatFluxBoundary "Heat Flux 1" on boundaries 6, 8, 9, 12, 14-21, 23-28, 34-40, 42, 43, 45, 46, 48-61, 63, 64
      HeatFluxType = ConvectiveHeatFlux
      HeatTransferCoefficientType = ExtForcedConvection
      Lwall = 1.9
      Lpl = 1.8
      U_src = root.comp1.ampr1.v_amb
      pA_src = root.comp1.ampr1.p_amb
      Text_src = userdef
      Text = int1(t)
      materialType = solid
    hf2: HeatFluxBoundary "Heat Flux 2" on no boundaries
      HeatFluxType = ConvectiveHeatFlux
      HeatTransferCoefficientType = ExtForcedConvection
      ExtNaturalConvectionType = HorizontalPlateUp
      Ldia = 4
      Lpl = 4
      U_src = root.comp1.ampr1.v_amb
      pA_src = root.comp1.ampr1.p_amb
      Text_src = userdef
      Text = int1(t)
      materialType = solid
    hf4: HeatFluxBoundary "Heat Flux 4" on boundaries 22, 41
      HeatFluxType = ConvectiveHeatFlux
      HeatTransferCoefficientType = ExtNaturalConvection
      Lwall = 0.6
      Lpl = 1.8
      U_src = root.comp1.ampr1.v_amb
      pA_src = root.comp1.ampr1.p_amb
      Text_src = userdef
      Text = int1(t)
      materialType = solid
    hf5: HeatFluxBoundary "Heat Flux 5" on boundaries 10, 44
      HeatFluxType = ConvectiveHeatFlux
      HeatTransferCoefficientType = ExtNaturalConvection
      ExtNaturalConvectionType = HorizontalPlateUp
      Ldia = 1.3
      Lpl = 0.9
      U_src = root.comp1.ampr1.v_amb
      pA_src = root.comp1.ampr1.p_amb
      Text_src = userdef
      Text = int1(t)
      materialType = solid
    temp1: TemperatureBoundary "Temperature 1" on boundaries 32 | T0_src = userdef; T0 = int1(t)
    ma1: MoistAirHeatTransferModel "Moist Air 1" on domains 4, 7, 8
      phi_cond_match_src = root.comp1.ampr1.phi_amb
      T_cond_match_src = userdef
      T_cond_match = int1(t)
      p_cond_match_src = root.comp1.ampr1.p_amb
    fluid2: FluidHeatTransferModel "Fluid 2" on domains 4, 7, 8 | k_mat = from_mat; fluidType = from_mat
      cec1: ConvectivelyEnhancedConductivity on all domains | NuCorrHLength = 1.9; TempDiffCombo = Automatic
    hs1: HeatSource on domains 4, 7, 8 | heatSourceType = HeatRate; P0 = if(T<273.15+25,10000,if(T>273.15+27,-10000,0))
  rad: SurfaceToSurfaceRadiation on boundaries 6-10, 12, 14-28, 34-46, 48-61, 63, 64
    dependent variable surfaceradiosity
    RadiationSettings.wavelengthDependenceOfSurfaceProperties = SolarAndAmbient
    dsurf1: DiffuseSurface (default)
      epsilon_rad_bandSolAmb = {1, 0}
      epsilon_rad_mat = userdef
      epsilon_rad = 0.8
      epsilon_radSolAmb_mat = userdefBand
      includeDiffuseIrradiance = 0
      ambientEmissivity = Blackbody
      ambientEmissivitySolAmb = Blackbody
      epsilon_amb = 0.8
      Tamb_src = root.comp1.ampr1.T_amb
      I_diffSolAmb_src = root.comp1.ampr1.Ish_amb
      userDefinitionTypeSolAmb = userDefinedForEachBand
      Idiff_src = root.comp1.ampr1.Ish_amb
    init1: init "Initial Values 1" (default)
      initialValueTypeSolAmb = blackbodyGraybody
      Tinit_src = root.comp1.ampr1.T_amb
    ers1: ExternalRadiationSource
      sourcePosition = SolarPosition
      locationType = ampr1
      DaylightSavingTime = 0
      Is_src = userdef
      Is = int2(t)
    dsurf3: DiffuseSurface (disabled) on no boundaries
      epsilon_rad_bandSolAmb = {0.94, 0.78}
      epsilon_radSolAmb_mat = userdefBand
      Tamb_src = root.comp1.ampr1.T_amb
    opac1: Opacity on domains 2, 3, 5, 6, 10, 11, 13
      userDefinitionTypeSolAmb = userDefinedForEachBand
      opaqueTypeSolAmbAllBands = 0
      opaqueTypeSolAmb = {0, 1}
  rasm: RadiationInAbsorbingScatteringMedia (disabled) on all domains
    dependent variable radiativeintensity
    ParticipatingMediaSettingsProperty.PerfIndex = 0.4
    ParticipatingMediaSettingsProperty.DiscreteOrdinatesMethod = 2
    ParticipatingMediaSettingsProperty.nrad = 1
    ParticipatingMediaSettingsProperty.wavelengthDependenceOfSurfaceProperties = SolarAndAmbient
    asm1: AbsorbingScatteringMedium (default)
    init1: init "Initial Values 1" (default)
    os1: OpaqueSurface (default) | epsilon_rad_bandSolAmb = {0.2, 0.8}; epsilon_radSolAmb_mat = userdefBand
    cib1: ContinuityOnInteriorBoundary (default)
  rpm: ParticipatingMediaRadiation "Radiation in Participating Media" (disabled) on all domains
    dependent variable radiativeintensity
    rpm1: ParticipatingMedium (default)
    init1: init "Initial Values 1" (default)
    os1: OpaqueSurface (default)
    cib1: ContinuityOnInteriorBoundary (default)

Multiphysics
  rhs1: RayHeatSource (disabled) on all domains | RayHeatSource_physics = gop; RayHeatDestination_physics = ht
  htrad1: HeatTransferWithSurfaceToSurfaceRadiation on boundaries 6-10, 12, 14-28, 34, 36-46, 48-61, 63, 64
    Heat_physics = ht
    Rad_physics = rad
  htrasm1: HeatTransferWithRadiationInAbsorbingScatteringMedia (disabled) on all domains
    Heat_physics = ht
    RPM_physics = rasm
  htrpm1: HeatTransferWithRadiationInParticipatingMedia (disabled) on all domains | Heat_physics = none; RPM_physics = rpm

Mesh
  mesh1 "Mesh 1"
    size: MeshSizeDefault | hmax = 1.4; hmin = 0.252; hcurve = 0.6; hnarrow = 0.5; hgrad = 1.5
    ftet1: FreeTet "Free Tetrahedral 1" on remaining entities | optcurved = on

Studies
  std1 "Study 1"
    time: Transient "Time Dependent"
      tunit = h
      tlist = range(0,1,24)
      activateCoupling = {rhs1, on, htrad1, on, htrasm1, on, htrpm1, on}

Solver configurations
  sol1 "Solution 1" (study std1)
    v1: Variables "Dependent Variables 1"
      comp1_rad_dsurf1_Jd_band: Field "Surface Radiosity, Downside (comp1.rad.dsurf1.Jd_band)" | scalemethod = init
      comp1_rad_dsurf1_Ju_band: Field "Surface Radiosity, Upside (comp1.rad.dsurf1.Ju_band)" | scalemethod = init
    t1: Time "Time-Dependent Solver 1"
      tlist = range(0,1,24)
      atolmethod = {comp1_rad_dsurf1_Jd_band, global, comp1_rad_dsurf1_Ju_band, global, comp1_T, global}
      atolvaluemethod = {comp1_rad_dsurf1_Jd_band, factor, comp1_rad_dsurf1_Ju_band, factor, comp1_T, factor}
      atol = {comp1_rad_dsurf1_Jd_band, 1e-3, comp1_rad_dsurf1_Ju_band, 1e-3, comp1_T, 1e-3}
      maxorder = 2
      estrat = exclude
      se1: Segregated | ntolfact = 0.1; segstabacc = segaacc; segaaccdim = 5; segaaccmix = 0.9; segaaccdelay = 1
        ss1: SegregatedStep "Temperature" | segvar = {comp1_T}; linsolver = d1; subdamp = 0.8; subjtech = once
        ss2: SegregatedStep "Radiosity"
          segvar = {comp1_rad_dsurf1_Ju_band, comp1_rad_dsurf1_Jd_band}
          linsolver = d2
          subdamp = 0.8
          subjtech = once
        ll1: LowerLimit | lowerlimit = comp1.T 0
      d1: Direct "Direct, heat transfer variables (ht)" | linsolver = pardiso; pivotperturb = 1.0E-13
      d2: Direct "Direct, radiation variables" | linsolver = pardiso; pivotperturb = 1.0E-13

Datasets
  dset1: Solution | solution = sol1
  ray1: Ray
    solution = sol1
    rgeomspec = fromphysics
    rgeom = pgeom_gop
    posdof = {comp1.qx, comp1.qy, comp1.qz}
    physicsinterface = gop
  grid1: Grid3D
    source = data
    data = dset1
    parmin1 = -0.45
    parmax1 = 1.95
    parmin2 = -0.45
    parmax2 = 1.95
    parmin3 = -0.00933435976453
    parmax3 = 1.46266256094
    res1 = 3
    res2 = 3
    res3 = 3
  cpt1: CutPoint3D | data = grid1; method = regulargrid; regulargridx = 3; regulargridy = 3; regulargridz = 3
  dset2: Solution on domains 4, 7, 8 | solution = sol1
  dset3: Solution "Ambient" on boundaries 32 | solution = sol1
  dset4: Solution "Probe Solution 4" | solution = sol1
  avh1: Average "Point Probe 1" | data = dset4

Derived values
  pev1: EvalPoint "Point Probe 1" | data = avh1; table = tbl1; expr = T

Evaluation groups
  eg1: EvaluationGroup | data = dset1
    av1: AvSurface "ambient" on boundaries 32 | expr = int1(t); unit = degC
    av2: AvVolume "Volume Average 2" on domains 4, 7, 8 | expr = T; unit = degC
    av3: AvSurface "Surface Average 3" (disabled) on boundaries 32 | expr = rad.ers1.q0s
    gev1: EvalGlobal "Global Evaluation 1" (disabled) | expr = ht.hs1.P0
    av4: AvVolume "Volume Average 4" on domains 4, 7, 8 | expr = ht.hs1.P0

Tables
  tbl1: Table "Probe Table 1"
    Time (h) | Temperature (degC), Point Probe 1
    0 | nan
    7.43394e-05 | nan
    0.000127018 | nan
    0.000232376 | nan
    0.000443091 | nan
    0.00086452 | nan
    0.00170738 | nan
    0.0033931 | nan
    0.00676454 | nan
    0.0135074 | nan
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
Plots
  pg1: PlotGroup3D "Ray Trajectories (gop)" (disabled) | data = ray1
    rtrj1: RayTrajectories
      col1: Color "Color Expression 1" | expr = gop.I
      filt1: RayTrajectoriesFilter "Filter 1"
    arpt1: ArrowPoint | data = cpt1; expr = {gop.srad1.nsolx, gop.srad1.nsoly, gop.srad1.nsolz}
  pg5: PlotGroup3D "3D Plot Group 5" | data = dset2
    slc1: Slice (disabled) | expr = T; unit = K
    slc2: Slice | expr = T; unit = degC; quickplane = xy
  pg2: PlotGroup3D "Temperature (ht)" | data = dset1
    surf1: Surface | expr = T; unit = degC
  pg3: PlotGroup3D "Isothermal Contours (ht)" | data = dset1
    iso1: Isosurface | expr = T; levelrounding = off
  pg4: PlotGroup3D "3D Plot Group 4" | data = dset2
    vol1: Volume | expr = T; unit = K
  pg6: PlotGroup1D "Probe Plot Group 6"
    tblp1: Table "Probe Table Graph 1" | table = tbl1

Exports
  anim1: Animation | target = player; frametime = 0.5
  anim2: Animation | target = player; frametime = 0.5